Bubble Dancer RES
0.0                      Mach
0      0      0.0        iYsym  iZsym  Zsym
1000.0 10.0   116.6      Sref   Cref   Bref
!3.4125 0.0    0.5        Xref   Yref   Zref
3.40   0.0    0.5        Xref   Yref   Zref
0.017                    CDo
#
#=============================================
BODY
Fuse pod
12  1.0
#
TRANSLATE
-12.5  0.0  -1.4
#
BFIL
fuseBD.dat

#=============================================
SURFACE
WING
6  1.0   30 -2.0
YDUPLICATE
     0.00000
ANGLE
     4.10000
SCALE
1.0  1.0  1.0
TRANSLATE
3.41  0.0  0.0
#----------------------------------
#    Xle         Yle         Zle         chord       angle   Nspan  Sspace
SECTION
    -3.41        0.0         0.0        10.5         0.0     7   0.25
AFIL
ag35.dat
#---------------------------
SECTION
    -3.25        18.0        0.0        10.0         0.0    11  -2.70
AFIL
ag35.dat
#---------------------------
SECTION
    -2.500       41.66       4.25        8.0        -1.0    11  -2.25
AFIL
ag36.dat
#---------------------------
SECTION
    -1.788       55.75       9.38        5.50       -1.0    1   0
AFIL
ag37.dat
#---------------------------
SECTION
    -0.95        57.64      10.064       4.4        -1.0    1   0
AFIL
ag37.dat
#---------------------------
SECTION
     0.000       58.3       10.40        3.375      -1.0    1   0
AFIL
ag37.dat
#
#=============================================
SURFACE
Horizontal tail
5  1.0  16 0.0
YDUPLICATE
     0.00000
ANGLE
    2.70000
TRANSLATE
    38.00000     0.00000     1.37500
#---------------------------
SECTION
     0.00000     0.00000     0.00000     5.5         0.000   7  -1.5

#Cname   Cgain  Xhinge  HingeVec       SgnDup
CONTROL
elevator  1.0   0.0     0.0 1.0 0.0    1.0
#---------------------------
SECTION
     1.85       12.0         0.00000     3.0         0.000   1   0

CONTROL
elevator  1.0   0.0     0.0 1.0 0.0    1.0
#---------------------------
SECTION
     1.85       14.0         0.00000     1.0         0.000   1   0

CONTROL
elevator  1.0   0.0     0.0 1.0 0.0    1.0
#
#=============================================
SURFACE
Vertical tail
6  1.0
SCALE
1.0 1.0 1.0
!0.7 0.7 0.7
!2.0 2.0 2.0
TRANSLATE
    46.5000     0.00000     0.00000
#---------------------------
SECTION
    -2.00   0.00000    -3.50000     5.00000     0.000   3   1.5

CONTROL
rudder1  1.0   0.4     0.0 0.0 1.0    1.0
#---------------------------
SECTION
    -2.80   0.00000     0.00000     7.00000     0.000   6   0.5

CONTROL
rudder1  1.0   0.4     0.0 0.0 1.0    1.0
#---------------------------
SECTION
    -1.20   0.00000     10.5        3.00000     0.000   1   0

CONTROL
rudder2  -0.5   0.4     0.0 0.0 1.0    1.0

CONTROL
rudder3  0.5   0.4     0.0 0.0 1.0    1.0
#---------------------------
SECTION
    -0.60   0.00000     5.0        3.00000     0.000   1   0

CONTROL
rudder2  0.5   0.4     0.0 0.0 1.0    1.0

CONTROL
rudder3  -0.5   0.4     0.0 0.0 1.0    1.0

#
#=============================================
